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/batch
! ANSYS input file written by Workbench version 2021 R1
! File used for geometry attach: C:\Users\gurka\OneDrive\Okul\ME413_Laboratory\Experiment_1\Ansys_final_files\dp0\Geom\DM\Geom.scdoc
/title,Ansys_final--Static Structural (B5)
/com,--- Data in consistent MKS units. See Solving Units in the help system for more information.
/units,MKS
/prep7
! Turn off shape checking because checks already performed inside WB mesher.
! See help system for more information.
SHPP,OFF,,NOWARN
etcon,set             ! allow ANSYS to choose best KEYOP's for 180x elements, resets any applicable keyopt to MAPDL defaults
/com,*********** Nodes for the whole assembly ***********
nblock,3,,10256
(1i9,3e20.9e3)
        1     4.000000000E-03     6.000000000E-01     2.200000000E-02
        2     0.000000000E+00     6.000000000E-01     2.200000000E-02
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-1
/com,*********** Nodes for all Remote Points ***********
nblock,3
(1i9,3e20.9e3)
     9325     2.502161544E-03     6.000000238E-01     1.099999994E-02
     9326     2.000000095E-03     0.000000000E+00     1.099999994E-02
-1
/com,*********** Elements for Body 1 "Geom\Solid" ***********
et,1,187
eblock,19,solid,,4478
(19i9)
        1        1        1        1        0        0        0        0       10        0        1      363      985      986      367     4526     7631     4527     4525
     4560     4561
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-1
et,2,186
keyo,2,2,1          ! set full integration on SOLID186
eblock,19,solid,,50
(19i9)
        1        2        1        1        0        0        0        0       20        0     4479       10       15       14       14     1625     1645     1641     1641
     1691     1701       14     1690     9271     9309     1641     9270     1692     1704     1702     1702
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-1
/com,*********** Send User Defined Coordinate System(s) ***********
csys,0
toffst,273.15,  ! Temperature offset from absolute zero
/com,*********** Set Reference Temperature ***********
tref,22.
/com,*********** Send Materials ***********
MP,EX,1,70000000000,	! Pa
MP,NUXY,1,0.346153846153846,

!************************* Model Summary ********************
!Geom\Solid,	Aluminum 2000,	matid,	1
!************************* End Model Summary ********************
/com,*********** Fixed Supports ***********
CMBLOCK,_FIXEDSU,NODE,       33
(8i10)
         1         2         5         7        17        18        19        20
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cmsel,s,_FIXEDSU
d,all,all
nsel,all
/com,*********** Create Remote Point "Internal Remote Point" ***********
! -------- Remote Point Used by "Moment" --------
*set,tid,4
*set,cid,3
et,cid,174
et,tid,170
keyo,tid,2,1               ! Don't fix the pilot node
keyo,tid,4,111111
keyo,cid,12,5              ! Bonded Contact
keyo,cid,4,1               ! Deformable RBE3 style load
keyo,cid,2,2               ! MPC style contact
eblock,10,,,10
(15i9)
     7467        3        3        3        0        8       12        6        6     1682     1676        6     1675
     7468        3        3        3        0        8       13       12       12     1683     1697       12     1682
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-1
*set,_npilot,9326
_npilot139=_npilot
type,tid
mat ,cid
real,cid
tshape,pilo
en,7477,_npilot
tshape
/com,*********** Create Remote Point "Remote Point" ***********
*set,tid,6
*set,cid,5
et,cid,174
et,tid,170
keyo,tid,2,1               ! Don't fix the pilot node
keyo,tid,4,111111
keyo,cid,12,5              ! Bonded Contact
keyo,cid,4,1               ! Deformable RBE3 style load
keyo,cid,2,2               ! MPC style contact
eblock,10,,,10
(15i9)
     7478        5        5        5        0        8       12        6        6     1682     1676        6     1675
     7479        5        5        5        0        8       13       12       12     1683     1697       12     1682
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-1
*set,_npilot,9325
_npilot43=_npilot
type,tid
mat ,cid
real,cid
tshape,pilo
en,7488,_npilot
tshape
! ****** Begin Command Snippet ******
!   Commands inserted into this file will be executed just after the remote point definition.
!   Constraint equation based contact elements are used to define the remote point.
!   The material, type, and real number for the contact/beam elements are equal to the parameter "cid".
!   The type number for the target(pilot) element is equal to the parameter "tid".
!   The remote point node number is equal to "_npilot"

!   Active UNIT system in Workbench when this object was created:  Metric (m, kg, N, s, V, A)
!   NOTE:  Any data that requires units (such as mass) is assumed to be in the consistent solver unit system.
!                See Solving Units in the help system for more information.


Measure_pilot = _npilot
! ****** End   Command Snippet ******
/com,*********** Construct Moment Using Remote Attachment ***********
fini
/com,****************************************************************************
/com,*************************    SOLUTION       ********************************
/com,****************************************************************************
/solu
antype,0                   ! static analysis
_thickRatio=  0     ! Ratio of thick parts in the model
eqsl,sparse,,,,,1
cntr,print,1               ! print out contact info and also make no initial contact an error
nldiag,cont,iter           ! print out contact info each equilibrium iteration
rescontrol,,none                 ! Do not keep any restart files
/com,****************************************************
/com,******************* SOLVE FOR LS 1 OF 1 ****************
nsel,s,node,,9326
f,all,mx,0.
f,all,my,-5.33664
f,all,mz,0.
nsel,all
nsub,1,1,1
time,1.
outres,erase
outres,all,none
outres,nsol,all,
outres,rsol,all
outres,eangl,all
outres,etmp,all
outres,veng,all
outres,strs,all,
outres,epel,all,
outres,eppl,all,
outres,cont,all,
! *********** WB SOLVE COMMAND ***********
! check interactive state
*get,ANSINTER_,active,,int
*if,ANSINTER_,ne,0,then
/eof
*endif
solve
/com *************** Write FE CONNECTORS *********
CEWRITE,file,ce,,INTE
/com,****************************************************
/com,*************** FINISHED SOLVE FOR LS 1 *************
/post1
! ****** Begin Command Snippet ******
!   Commands inserted into this file will be executed immediately after the ANSYS /POST1 command.

!   Active UNIT system in Workbench when this object was created:  Metric (m, kg, N, s, V, A)
!   NOTE:  Any data that requires units (such as mass) is assumed to be in the consistent solver unit system.
!                See Solving Units in the help system for more information.


my_roty=ROTY(Measure_pilot)
! ****** End   Command Snippet ******
fini
